/prep7
et,1,plane82

k,1,-7.0,0.0
k,2,0.0,0.0
k,3,0.0,-7.0
k,4,-5.2,-7.0
k,5,-5.2,-0.8
k,6,-7.0,-0.2

k,7,-3.1,-3.85
k,8,-2.85,-3.6
k,9,-1.95,-3.6
k,10,-1.7,-3.85
k,11,-1.7,-4.95
k,12,-1.95,-5.2
k,13,-2.85,-5.2
k,14,-3.1,-4.95
a,1,2,3,4,5,6
a,7,8,9,10,11,12,13,14
asba,1,2
arsym,x,3
aadd,all

wprota,0,0,90
asbw,all
kwpave,5
asbw,all
kwpave,8
asbw,all
kwpave,9
asbw,all
kwpave,25
asbw,all
kwpave,26
asbw,all
kwpave,19
asbw,all

wprota,0,90,0
kwpave,5
asbw,all
kwpave,8
asbw,all
kwpave,7
asbw,all
kwpave,14
asbw,all
kwpave,13
asbw,all

wpcsys,0,0

lesize,all,0,,4
asel,all
amesh,all

secwrite,'A0',sect,,1        !写入文件 .sect
asel,all
aclear,all
adele,all,,,1
